# LLC Primary Side
Fs := 65.27 kHz
Lm := 300 μH
Lr := 37 μH
Cr := 80 nF
P := 600 W
Eff := 0.95
Vin := 400 V
N := 5.33
Vo := 36 V
w := 2*π*Fs
s := 1j*w
Vpri_pk := Vin/2 = 200 V  # Peak voltage for half bridge LLC
Pt := P/Eff = 631.579 W
Rac := Vo^2*N^2/Pt = 58.2951 Ω
Irs := Pt/(0.45*Vin) = 3.50877 A  # Full Load Primary Resonant Current
# (-0.05V allowance for dead time)
ORIGIN := 1
index := 1 .. 100
f[index] := 1 Hz*1.15^index
s := 1j*2*π*f
Zm := Rac*s*Lm/(Rac + s*Lm)  # Impedance of Tx primary with load
Zt := 1/(s*Cr) + s*Lm + Zm  # Total tank impedance
Vm := Vin/2*Zm/Zt
Vmag := |Vm|
# LLC Secondary Side
C1 := 300 μF
Resr1 := 6.67*10^-3 Ω  # 1st Stage Filter
# 8A0BRD NCC HHSE630ETD101MJC5S 63V 100uF 3.4A 20m 10x12.5  (x4)
# ALTERNATE: KEMET A759MX447M1HAAE028 50V 440uF 6.01A .28m 10x18 (x3)
L2 := 0.000 μH
C2 := 100 μF
Resr2 := 20*10^-3 Ω  # 2nd Stage Filter
# 8A0BRD NCC HHSE630ETD101MJC5S 63V 100uF 3.4A 20m 10x12.5  (x1)
Vsec_pk := 2*Vpri_pk/N = 75.0469 V  # Peak Voltage across Rectifier
Isec := Irs*N = 18.7018 A  # Full Load Tx Secondary Current (Sum current of rectifiers)
Isec_pk := Isec*sqrt(2) = 26.4483 A  # Peak Current through the Rectifier
Iload := P/Vo = 16.6667 A  # Full load Output current
I1st := sqrt(Isec^2 - Iload^2) = 8.48398 A  # 1st Stage Filter Capacitor Ripple Current
Loss_cap1 := I1st^2*Resr1 = 0.480092 W  # 1st Stage Filter Capacitor Power Loss
w := 2*π*(Fs*2)
s := 1j*w  # Note: The frequency is doubled at secondary side
Rl := Vo^2/P = 2.16 Ω  # Load Resistance
Zc2 := Resr2 + 1/(s*C2) = (0.02 - 0.012192i) Ω  # 2nd Stage Cap impedance
Zc2l := Rl*Zc2/(Rl + Zc2) = (0.0198835 - 0.011969i) Ω  # Output impedance ( Load||C2)
Z2 := Zc2l + s*L2 = (0.0198835 - 0.011969i) Ω  # 2nd Stage Impedance (L2+Load||C2)
Zc1 := Resr1 + 1/(s*C1) = (0.00667 - 0.00406401i) Ω  # 1st Stage Cap Impedance
Zo := Zc1*Z2/(Z2 + Zc1) = (0.00499459 - 0.00303394i) Ω  # Total Output Impedance
Vac_1 := Isec*Zo = (0.0934076 - 0.05674i) V  # Voltage across 1st Stage Filter
Vo_ripple := Vac_1*Zc2l/Z2 = (0.0934076 - 0.05674i) V
Vo_ripple_rms := |Vo_ripple| = 0.10929 V
Vo_pk := Vo_ripple_rms*sqrt(2) = 154.56 mV  # Pk-Pk Ripple voltage
